K_v := 1.2
l_OB := 0.85
β := 60 deg
Θ := 180 deg*(K_v - 1)/(K_v + 1) = 16.3636 deg
l_OB2 := 1.09825
l_OB1 := 1.79175
X_O := l_OB*sin(β/2)/sin(Θ) = 1.50852
l_OA := (l_OB1 - l_OB2)/2 = 0.34675
l_AB := (l_OB1 + l_OB2)/2 = 1.445
