# Приложение 1
# 1. Исходные данные
#
# Ход толкателя
#
# Допустимый угол давления
#
# Рабочий угол
#
# Угол удаления
#
# Угол сближения
#
# Угол дальнего выстоя
h := 0.08  # м
Θ_m := 32 deg  # рад
f_r := 160 deg  # рад
f_u := 67.5 deg  # рад
f_c := 67.5 deg  # рад
f_d := 25 deg  # рад
# 2. Кинематические диаграммы
# Рассчитаем углы в характерных точках
f0 := 0
f0/deg = 0
f1 := f_u/2
f1/deg = 33.75
f2 := f_u
f2/deg = 67.5
f3 := f_u + f_d
f3/deg = 92.5
f4 := f_u + f_d + f_c/2
f4/deg = 126.25
f5 := f_r
f5/deg = 160
# Принимаем максимальные значения аналогов ускорения толкателя в фазах удаления и сближения, равными единице:
am1 := 1
am2 := 1
# Эти значения уточняются после построения диаграммы перемещений. Проведем интерполяцию графика аналога ускорений кусочно-линейной функцией
aa1 := [0; am1; am1; -am2; -am2; 0; 0; -am2; -am2; am1; am1; 0; 0]
ff1 := [0; .0001; f1; f1 + .0001; f2; f2 + .0001; f3; f3 + .0001; f4; f4 + .0001; f5; f5 + .0001; 2*π]
a_q(f) := linterp(ff1, aa1, f)
a_q(120 deg) = -1
f := 0, .0001 .. 2*π
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# Построим график аналога скоростей:
v_q(f) := integral(a_q(f), f = 0 .. f)
v_q(120 deg) = -0.479966
f := 0, .01 .. 2*π
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# Проведем интерполяцию графика аналога скоростей кусочно-линейной функцией:
Vv1 := [0; v_q(f1); v_q(f2); v_q(f3); v_q(f4); v_q(f5); v_q(2*π)]
Ff1 := [0; f1; f2; f3; f4; f5; 2*π]
v_q(f) := linterp(Ff1, Vv1, f)
v_q(130 deg) = -0.523508
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# Построим диаграмму перемещений:
s(f) := integral(v_q(f), f = 0 .. f)
s(120 deg) = 0.231798
f := 0, .01 .. 2*π
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# Рассчитаем максимальные значения аналогов ускорения в фазах удаления и сближения и пересчитаем все кинематические параметры:
am11 := am1*h/s(f_u)
am11 = 0.230562
am22 := am2*h/(s(f_u) - s(f_r))
am22 = 0.230619
aa1 := [0; am11; am11; -am22; -am22; 0; 0; -am22; -am22; am11; am11; 0; 0]
fa1 := [0; .0001; f1; f1 + .0001; f2; f2 + .0001; f3; f3 + .0001; f4; f4 + .0001; f5; f5 + .0001; 2*π]
a_q(f) := linterp(ff1, aa1, f)
a_q(120 deg) = -0.230619
f := 0, .0001 .. 2*π
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v_q(f) := integral(a_q(f), f = 0 .. f)
v_q(120 deg) = -0.110753
f := 0, .02 .. 2*π
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Vv1 := [0; v_q(f1); 0; 0; v_q(f4); 0; 0]
Ff1 := [0; f1; f2; f3; f4; f5; 2*π]
v_q(f) := linterp(Ff1, Vv1, f)
v_q(120 deg) = -0.110506
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s(f) := integral(v_q(f), f = 0 .. f)
s(120 deg) = 0.0534818
f := 0, .01 .. 2*π
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# 3. Рассчет минимального радиуса кулачка и смещения толкателя
# Выполним расчет с использованием процедуры Given-Find. Запишем выражения для тангенсов углов давления в точках с максимальным и
# минимальным значениями аналога скорости
# Первое приближение для неизвестных:
s0 := h
e := 0
Given
tan(Θ_m) == (v_q(f1) + e)/(s0 + s(f1))
tan(Θ_m) == (-v_q(f4) - e)/(s0 + s(f4))
FF := Find(s0, e)
s0 := FF[0]
s0 = 0.177164
e := FF[1]
e = -0.000112889
s0 := 0.18
r0 := sqrt(s0^2 + e^2)
r0 = 0.18
r0 := 0.18
# Построим фазовый портрет. Уравнения касательных к фазовому портрету имеют вид
x1(y) := -e - tan(Θ_m)*(y + s0)
x2(y) := -e + tan(Θ_m)*(y + s0)
# Диапазон изменения аргумента в уравнениях касательных
y := -s0, -s0 + .001 .. h
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# Построим график угла давления:
tgΘ(f) := (v_q(f) + e)/(s0 + s(f))
Θ(f) := atan(tgΘ(f))
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# 4. Построение профиля кулачка
# Уравнения окружности, радиус которой равен смещению:
x_A(f) := e*cos(f)
y_A(f) := e*sin(f)
# Уравнения окружности минимального радиуса:
x_B(f) := x_A(f) + s0*cos(f + π/2)
y_B(f) := y_A(f) + s0*sin(f + π/2)
# Уравнения центрового профиля, полученные методом инверсии:
x_C(f) := x_B(f) + s(f)*cos(f + π/2)
y_C(f) := y_B(f) + s(f)*sin(f + π/2)
# Построение конструктивного профиля кулачка.
# Радиус ролика
r_R := 0.25*r0 = 0.045
r_R := 0.045
# Уравнения конструктивного профиля, полученные методом инверсии, имеют вид
x_D(f) := x_C(f) - r_R*cos(f + π/2 - Θ(f))
y_D(f) := y_C(f) - r_R*sin(f + π/2 - Θ(f))
# Угол для изображения ролика и толкателя
f := 0 deg
# Уравнения окружности, изображающей ролик, имеют вид
xr(ϕ) := x_C(f) + r_R*cos(ϕ)
yr(ϕ) := y_C(f) + r_R*sin(ϕ)
# Уравнения прямой, изображающей толкатель, имеют вид
X := [x_C(f); x_C(f) - h*sin(f)]
Y := [y_C(f); y_C(f) + h*cos(f)]
ϕ := 0, π/24 .. 2*π
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